@DSL Default;
@Behaviour ComputeSpeedOfSound;

@ProvidesSymmetricTangentOperator;
@Integrator{
  constexpr auto id = Stensor::Id();
  constexpr auto yg = stress{150e9};
  constexpr auto nu = real{0.3};
  constexpr auto l = computeLambda(yg, nu);
  constexpr auto mu = computeMu(yg, nu);
  const auto e = eto + deto;
  sig = l * trace(e) * id + 2 * mu * e;
  if (computeTangentOperator_) {
    Dt = l * Stensor4::IxI() + 2 * mu * Stensor4::Id();
  }
}

@SpeedOfSound {
  constexpr auto yg = stress{150e9};
  v_sound = sqrt(yg / rho_m0);
}
