@Behaviour ParameterTest;
@Author Helfer Thomas;
@Date 13/11/2018;
@Description{
 "Test of how parameters are handled."
}

// Material properties
@Parameter young = 150e9;
@Parameter nu    = 0.3;
young.setGlossaryName("YoungModulus");
nu.setGlossaryName("PoissonRatio");

@ProvidesSymmetricTangentOperator;
@Integrator{
  static_cast<void>(smt); // remove compiler warning
  const stress lambda = computeLambda(young,nu);
  const stress mu     = computeMu(young,nu);
  sig = lambda*trace(eto+deto)*StrainStensor::Id()+2*mu*(eto+deto);
  if(computeTangentOperator_){
    Dt = lambda*Stensor4::IxI()+2*mu*Stensor4::Id();
  }
}
